///////     MOCAP MARKER SETUP      ///////

#path MOCAP_EXTRA_DRIVERS_FILE "ExtraDrivers_LTHT.any"
#path MOCAP_MARKER_PROTOCOL_FILE "MarkerProtocol_LTHT.any"
#path MOCAP_FORCE_PLATE_FILE "ForcePlates_LTHT.any"


///////     MOCAP BODYMODEL CONFIGURATION      ///////

// This defines which body parts are included
#path BODY_MODEL_CONFIG_FILE "BodyModelConfig_LTHT.any"


///////     OTHER SETUP         ///////

AnyVec3 Gravity = -9.81*{0,1,0};
