    AnyString PrefixStr=""; //if the dataset makes use of a prefix name which goes in front of all markers and processed datanames write it here
    #define PrefixDef(Arg) Arg
    FileName = MOCAP_C3D_DATA_PATH +"/"+ Main.ModelSetup.TrialSpecificData.TrialFileName + ".c3d"; //add the extension to the file name here
    ConstructModelOnOff = Off;
    ConstructChartOnOff = Off;

    MarkerUseAllPointsOnOff = On;
    MarkerUseCamMaskOnOff = Off;
    PointsScaleFactor = 1/1000;
    MarkerDrawOnOff =On;
    #ifdef MOCAP_IS_STANDING_REFERENCE
    #if MOCAP_IS_STANDING_REFERENCE == 1
    #define DISABLE_C3D_FILTERS
    #endif
    #endif


    // HACK_WORKAROUND. We need to disable filters when
    // using standing refernce recordings that often only
    // has 1 time step.
    #ifdef DISABLE_C3D_FILTERS
    MarkerFilterIndex =-1;
    AnalogFilterIndex =-1;
    #undef DISABLE_C3D_FILTERS
    #else
    MarkerFilterIndex =0;
    AnalogFilterIndex =1;
    #endif


    Filter =  {
      N = 2;
      Fc = {5};
      Type = LowPass;
    };

    /// This filter is used for the analog data
    AnyFunButterworthFilter LowPassFilter = {
      FilterForwardBackwardOnOff = On;
      AutomaticInitialConditionOnOff = On;
      N = 2;
      AnyVar CutOffFrequency=12;

      AnyVar SampleFreq=.Header.VideoFrameRate* .Header.NoAnalogSamplesPer3DFrame   ;
      W = {1/(iffun(eqfun(SampleFreq,0),100.0,SampleFreq)*0.5)*CutOffFrequency};
      Type = LowPass;
    };


    MarkerScaleXYZ = 0.015*{1,1,1};
    MarkerRGB={0,0,1};
