Kinematics.ApproxVelAccPerturb = 1.0/C3DData.Header.VideoFrameRate;
InitialConditions.ApproxVelAccPerturb = 1.0/C3DData.Header.VideoFrameRate;

 InitialConditions.KinematicTol=1e-5;
 Kinematics.KinematicTol=1e-5;

 #if ANYBODY_V1 >= 6 & ANYBODY_V2 >= 1
 Kinematics.Solver = &Kinematics.SolverOptions.KinSolDet1;
 InitialConditions.Solver = Kinematics.Solver;
 #else
 Kinematics.SolverType = KinSolDeterminate;
 InitialConditions.SolverType = Kinematics.SolverType;
 #endif

 #ifdef INCLUDE_MUSCLE_WEIGHT_FACTOR
 Main = {AnyVar Power = .InverseDynamics.Criterion.Power;};
 #if INCLUDE_MUSCLE_WEIGHT_FACTOR > 0
 InverseDynamics.Criterion.PrimaryTerm.Weight_SearchName = "WeightFactor";
 #endif
 #endif


//InverseDynamics.PreOperation = {
//  AnyOperation &SetView = Main.ModelSetup.ModelViews.SetViewMacros.InverseDynamicView ;
//  AnyOperationMacro UpdateValues_HACK_WORKAROUND = { MacroStr = {"classoperation Main"+ strquote("Update Values") };  };
//  AnyOperation &Init = Main.Studies.InverseDynamicStudy.InitialConditions;
// };
