//# Defintions for the python test framwork
//define = [
//  {'TLEM_VERSION':'"2.0"'},
//  {'TLEM_VERSION':'"1.1"'},
//]
//ignore_errors = ['FileReader.FileName']

#path MOCAP_PATH_MAINFILEDIR "../Examples/Plug-in-gait_Squat_StandingRefScaling/Trials/StandingRef_1/"
#path MOCAP_PATH_MAINFILE "<MOCAP_PATH_MAINFILEDIR>/Main.any"
#define MOCAP_NAME_MAINFILEDIR "StandingRef_1"


#path TEMP_PATH "Output"

#ifdef TEST_NAME

   #ifndef AMMR_VERSION
   #define MOCAP_TEST_FILENAME_PREFIX TEST_NAME + "_AMMR1_"
   #else
   #define MOCAP_TEST_FILENAME_PREFIX TEST_NAME + "_AMMR2_"
   #endif

#else
#define  MOCAP_TEST_FILENAME_PREFIX  "GUI_"
#path AMMR_PATH "../ammr"
#define TLEM_VERSION "1.1"
#endif


#include "libdef.any"

#include "<MOCAP_PATH_MAINFILE>"

Main =
{
  AnyOperation& RunTest = Main.RunParameterIdentification;

};
